*Heading
** Job name: GNL-ESL-R2-1-1
** Generated by: Abaqus/CAE 2023.HF4
*Preprint, echo=NO, model=NO, history=NO, contact=NO
**
** PARTS
**
*Part, name=PART-1-1
*Node
      1,           0.,           0.,           0.
      2,   1.29999995,           0.,           0.
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*Element, type=S4R
 1,  1,  2,  9,  8
 2,  2,  3, 10,  9
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*Nset, nset=SET-1, generate
  1,  49,   1
*Elset, elset=SET-1, generate
  1,  36,   1
** Section: Section-1-SET-1
*SHELL GENERAL SECTION, ELSET = SET-1, USER, UNSYMM, VARIABLES = 52, PROPERTIES = 36
0.1050,
1.1595e+09, 1.8509e+08, 0.0000e+00, 1.5907e+07, 4.6179e+05, 0.0000e+00, 2.0543e+08, 6.3129e+08
0.0000e+00, 4.4405e+05, 1.4902e+06, 0.0000e+00, 0.0000e+00, 0.0000e+00, 3.8901e+08, 0.0000e+00
0.0000e+00, 7.6186e+04, 1.5891e+07, 3.2013e+05, 0.0000e+00, 1.1060e+06, 1.8484e+03, 0.0000e+00
4.4494e+05, 9.6080e+05, 0.0000e+00, 1.8126e+03, 6.7990e+03, 0.0000e+00, 0.0000e+00, 0.0000e+00
7.6405e+04, 0.0000e+00, 0.0000e+00, 5.0612e+04
*TRANSVERSE SHEAR STIFFNESS
3.7217e+08, 3.3013e+08
*End Part
**
**
** ASSEMBLY
**
*Assembly, name=Assembly
**
*Instance, name=PART-1-1, part=PART-1-1
*End Instance
**
*Nset, nset=SET-CENTER, instance=PART-1-1
 25,
*Nset, nset=SET-NODE-1, instance=PART-1-1
 1,
*Nset, nset=SET-NODE-2, instance=PART-1-1
 2,
*Nset, nset=SET-NODE-3, instance=PART-1-1
 3,
*Nset, nset=SET-NODE-4, instance=PART-1-1
 4,
*Nset, nset=SET-NODE-5, instance=PART-1-1
 5,
*Nset, nset=SET-NODE-6, instance=PART-1-1
 6,
*Nset, nset=SET-NODE-7, instance=PART-1-1
 7,
*Nset, nset=SET-NODE-43, instance=PART-1-1
 43,
*Nset, nset=SET-NODE-44, instance=PART-1-1
 44,
*Nset, nset=SET-NODE-45, instance=PART-1-1
 45,
*Nset, nset=SET-NODE-46, instance=PART-1-1
 46,
*Nset, nset=SET-NODE-47, instance=PART-1-1
 47,
*Nset, nset=SET-NODE-48, instance=PART-1-1
 48,
*Nset, nset=SET-NODE-49, instance=PART-1-1
 49,
*Nset, nset=SET-X0, instance=PART-1-1, generate
  1,  43,   7
*Nset, nset=SET-XL, instance=PART-1-1, generate
  7,  49,   7
*Nset, nset=SET-Y0, instance=PART-1-1, generate
 1,  7,  1
*Nset, nset=SET-YS, instance=PART-1-1, generate
 43,  49,   1
*Nset, nset=_M8, internal, instance=PART-1-1, generate
 1,  6,  1
*Nset, nset=_M9, internal, instance=PART-1-1, generate
 43,  48,   1
** Constraint: Constraint-U2-1-2
*Equation
2
SET-NODE-1, 2, 1.
SET-NODE-2, 2, -1.
** Constraint: Constraint-U2-2-3
*Equation
2
SET-NODE-2, 2, 1.
SET-NODE-3, 2, -1.
** Constraint: Constraint-U2-3-4
*Equation
2
SET-NODE-3, 2, 1.
SET-NODE-4, 2, -1.
** Constraint: Constraint-U2-4-5
*Equation
2
SET-NODE-4, 2, 1.
SET-NODE-5, 2, -1.
** Constraint: Constraint-U2-5-6
*Equation
2
SET-NODE-5, 2, 1.
SET-NODE-6, 2, -1.
** Constraint: Constraint-U2-6-7
*Equation
2
SET-NODE-6, 2, 1.
SET-NODE-7, 2, -1.
** Constraint: Constraint-U2-43-44
*Equation
2
SET-NODE-43, 2, 1.
SET-NODE-44, 2, -1.
** Constraint: Constraint-U2-44-45
*Equation
2
SET-NODE-44, 2, 1.
SET-NODE-45, 2, -1.
** Constraint: Constraint-U2-45-46
*Equation
2
SET-NODE-45, 2, 1.
SET-NODE-46, 2, -1.
** Constraint: Constraint-U2-46-47
*Equation
2
SET-NODE-46, 2, 1.
SET-NODE-47, 2, -1.
** Constraint: Constraint-U2-47-48
*Equation
2
SET-NODE-47, 2, 1.
SET-NODE-48, 2, -1.
** Constraint: Constraint-U2-48-49
*Equation
2
SET-NODE-48, 2, 1.
SET-NODE-49, 2, -1.
*End Assembly
**
** BOUNDARY CONDITIONS
**
*Boundary
SET-X0, 1, 1
SET-X0, 3, 3
**
SET-Y0, 3, 3
**
SET-YS, 3, 3
**
SET-CENTER, 2, 2
**
SET-XL, 3, 3
**
** ----------------------------------------------------------------
**
** STEP: Step-1
**
*Step, name=Step-1, nlgeom=YES, inc=1000, unsymm=YES
*Static, riks
0.001, 1., 1e-15, 0.02, 1.,
**
*CONTROLS, PARAMETERS=TIME INCREMENTATION
12 , 22 , 30 , 300 , 30 ,  5
**
*CONTROLS, PARAMETERS=FIELD, FIELD=DISPLACEMENT
, 1., , , ,
**
*CONTROLS, PARAMETERS=FIELD, FIELD=ROTATION
, 1., , , ,
**
** BOUNDARY CONDITIONS
**
** Name: Disp-BC-1 Type: Displacement/Rotation
*Boundary
SET-XL, 1, 1, -0.015
**
** OUTPUT REQUESTS
**
*Restart, write, frequency=0
**
** FIELD OUTPUT: F-Output-1
**
*Output, field
*Node Output
RF, U
*Element Output, directions=YES
SDV, ELSE, ELASE, SF, SE
**
** HISTORY OUTPUT: H-Output-1
**
*Output, history, variable=PRESELECT
*End Step
